1.
A := [1, 1, -1, -2; 2, 1, -1, 1; 1, 1, -3, 1]
b := [0; -2; 4]
Â := [1, 1, -1, -2, 0; 2, 1, -1, 1, -2; 1, 1, -3, 1, 4]
[1, 1, -1, -2, 0; 0, -1, 1, 5, -2; 0, 0, -2, 3, 4]
система_имеет_бесконечное_количество_решений
2.*а
A := [3, -1, 1; 2, -5, -3; 1, 1, -1]
Â := [3, -1, 1, 4; 2, -5, -3, -17; 1, 1, -1, 0]
rank(A) = 3
rank(Â) = 3
система_совместна_и_имеет_1_решение
2.*б
A := [2, -4, 6; 1, -2, 3; 3, -6, 9]
Â := [2, -4, 6, 1; 1, -2, 3, -2; 3, -6, 9, 5]
rank(A) = 1
rank(Â) = 2
система_несовместна
2.*в
A := [1, 2, 5; 3, 1, -8]
Â := [1, 2, 5, 4; 3, 1, -8, -2]
rank(A) = 2
rank(Â) = 2
система_совместна_и_имеет_бесконечное_количество_решений
3.
A := [1, 3, -2, 4; 0, 5, 0, 1; 0, 0, 3, 0; 0, 0, 0, 2]
Â := [1, 3, -2, 4, 3; 0, 5, 0, 1, 2; 0, 0, 3, 0, 4; 0, 0, 0, 2, 1]
rank(A) = 4
rank(Â) = 4
система_совместна_и_имеет_1_решение
3.
A := [1, 2, 3; 4, 5, 6; 7, 8, 9]
Â := [1, 2, 3, 5; 4, 5, 6, 5; 7, 8, 9, 5]
rank(A) = 2
rank(Â) = 2
Еслиa, b .. c_одновременно_не_равны_друг_другу
